*Heading
** Job name: Job-1 Model name: A320-19
** Generated by: Abaqus/CAE 2016
*Preprint, echo=NO, model=NO, history=NO, contact=NO
**
** PARTS
**
*Part, name=A320
*Node
      1,        2771.,           0.,        112.5
      2,        2681.,           0.,        112.5
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*Element, type=S4R
   1,    1,   29,  831,   46
   2,   29,   30,  832,  831
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*Nset, nset=SKIN
    1,    2,    3,    4,    5,    6
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*Elset, elset=SKIN
    1,    2,    3,    4,    5,    6
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*Nset, nset=SPAR
    3,    4,    6,    8,   10,   13
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*Elset, elset=SPAR
 1785, 1786, 1787, 1788, 1789, 1790
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** Section: Section-1-SKIN
*Shell Section, elset=SKIN, material=ALUMINIUM
1.65, 5
** Section: Section-2-SPAR
*Shell Section, elset=SPAR, material=ALUMINIUM
2.9, 5
*End Part
**
**
** ASSEMBLY
**
*Assembly, name=Assembly
**
*Instance, name=A320-1, part=A320
*End Instance
**
*Node
      1,         153.,           0.,           0.
      2,        1141.,        112.5,        112.5
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*Nset, nset=HINGE_2, instance=A320-1
   7,   8,  22,  23, 156, 157
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*Nset, nset=M_SET-17
 1,
*Nset, nset=M_SET-18
 2,
*Nset, nset=M_SET-19
 3,
*Nset, nset=M_SET-20
 4,
*Nset, nset=M_SET-21
 5,
*Nset, nset=M_SET-22
 6,
*Nset, nset=M_SET-23
 7,
*Nset, nset=M_SET-24
 8,
*Nset, nset=M_SET-25
 9,
*Nset, nset=M_SET-26
 10,
*Nset, nset=M_SET-27
 11,
*Nset, nset=M_SET-28
 12,
*Nset, nset=M_SET-29
 13,
*Nset, nset=M_SET-30
 14,
*Nset, nset=M_SET-31
 15,
*Nset, nset=M_SET-32
 16,
*Nset, nset=POINT_6, instance=A320-1
  11,  14,  27,  28, 199, 200
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*Nset, nset=POINT_7, instance=A320-1
  239,  254,  670,  726, 1267, 1306
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*Nset, nset=POINT_8, instance=A320-1
  228,  265,  659,  715, 1256, 1295
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*Nset, nset=POINT_9, instance=A320-1
  216,  277,  647,  703, 1244, 1283
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*Nset, nset=POINT_10, instance=A320-1
  205,  288,  636,  692, 1233, 1272
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*Nset, nset=POINT_11, instance=A320-1
  166,  520,  548, 1143, 1148, 1153
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*Nset, nset=POINT_12, instance=A320-1
   86,  111,  372,  449,  888,  937
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*Nset, nset=POINT_13, instance=A320-1
   75,  122,  383,  460,  877,  926
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*Nset, nset=POINT_14, instance=A320-1
   64,  133,  394,  471,  866,  915
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*Nset, nset=POINT_15, instance=A320-1
   53,  144,  405,  482,  855,  904
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*Nset, nset=POINT_16, instance=A320-1
   1,   4,  18,  19,  41,  42
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*Nset, nset=RIB_A, instance=A320-1
  12,  13,  15,  26, 188, 189
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*Nset, nset=RIB_B, instance=A320-1
   9,  10,  24,  25, 172, 173
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*Nset, nset=RIB_C, instance=A320-1
   5,   6,  20,  21,  96,  97
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*Nset, nset=RIB_D, instance=A320-1
   2,   3,  16,  17,  32,  33
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*Nset, nset=SET-33
 1,
*Nset, nset=SET-34
 3,
*Nset, nset=SET-35
 5,
*Nset, nset=SET-36
 2,
*Nset, nset=SET-37
 4,
*Nset, nset=SET-38
 6,
*Nset, nset=SET-39
 16,
*Nset, nset=SET-40
 7,
*Nset, nset=SET-41
 8,
*Nset, nset=SET-42
 9,
*Nset, nset=SET-43
 10,
*Nset, nset=SET-44
 11,
*Nset, nset=SET-45
 11,
*Nset, nset=SET-46
 12,
*Nset, nset=SET-47
 13,
*Nset, nset=SET-48
 14,
*Nset, nset=SET-49
 15,
*Nset, nset=SET-50
 14,
*Nset, nset=SET-51
 2,
*Nset, nset=SET-52
 6,
*Nset, nset=SET-53
 16,
*Nset, nset=SET-54
 7,
*Nset, nset=SET-55
 8,
*Nset, nset=SET-56
 9,
*Nset, nset=SET-57
 10,
*Nset, nset=SET-58
 11,
*Nset, nset=SET-59
 12,
*Nset, nset=SET-60
 13,
*Nset, nset=SET-61
 14,
*Nset, nset=SET-62
 15,
*Nset, nset=SET-63
 4,
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*Surface, type=NODE, name=RIB_A_CNS_, internal
RIB_A, 1.
*Surface, type=NODE, name=RIB_B_CNS_, internal
RIB_B, 1.
*Surface, type=NODE, name=HINGE_2_CNS_, internal
HINGE_2, 1.
*Surface, type=NODE, name=RIB_C_CNS_, internal
RIB_C, 1.
*Surface, type=NODE, name=RIB_D_CNS_, internal
RIB_D, 1.
*Surface, type=NODE, name=POINT_6_CNS_, internal
POINT_6, 1.
*Surface, type=NODE, name=POINT_7_CNS_, internal
POINT_7, 1.
*Surface, type=NODE, name=POINT_8_CNS_, internal
POINT_8, 1.
*Surface, type=NODE, name=POINT_9_CNS_, internal
POINT_9, 1.
*Surface, type=NODE, name=POINT_10_CNS_, internal
POINT_10, 1.
*Surface, type=NODE, name=POINT_11_CNS_, internal
POINT_11, 1.
*Surface, type=NODE, name=POINT_12_CNS_, internal
POINT_12, 1.
*Surface, type=NODE, name=POINT_13_CNS_, internal
POINT_13, 1.
*Surface, type=NODE, name=POINT_14_CNS_, internal
POINT_14, 1.
*Surface, type=NODE, name=POINT_15_CNS_, internal
POINT_15, 1.
*Surface, type=NODE, name=POINT_16_CNS_, internal
POINT_16, 1.
** Constraint: MPC-Constraint-1
*MPC
BEAM, RIB_A, M_SET-17
** Constraint: MPC-Constraint-2
*MPC
BEAM, RIB_B, M_SET-18
** Constraint: MPC-Constraint-3
*MPC
BEAM, HINGE_2, M_SET-19
** Constraint: MPC-Constraint-4
*MPC
BEAM, RIB_C, M_SET-20
** Constraint: MPC-Constraint-5
*MPC
BEAM, RIB_D, M_SET-21
** Constraint: MPC-Constraint-6
*MPC
BEAM, POINT_6, M_SET-22
** Constraint: MPC-Constraint-7
*MPC
BEAM, POINT_7, M_SET-23
** Constraint: MPC-Constraint-8
*MPC
BEAM, POINT_8, M_SET-24
** Constraint: MPC-Constraint-9
*MPC
BEAM, POINT_9, M_SET-25
** Constraint: MPC-Constraint-10
*MPC
BEAM, POINT_10, M_SET-26
** Constraint: MPC-Constraint-11
*MPC
BEAM, POINT_11, M_SET-27
** Constraint: MPC-Constraint-12
*MPC
BEAM, POINT_12, M_SET-28
** Constraint: MPC-Constraint-13
*MPC
BEAM, POINT_13, M_SET-29
** Constraint: MPC-Constraint-14
*MPC
BEAM, POINT_14, M_SET-30
** Constraint: MPC-Constraint-15
*MPC
BEAM, POINT_15, M_SET-31
** Constraint: MPC-Constraint-16
*MPC
BEAM, POINT_16, M_SET-32
*End Assembly
**
** MATERIALS
**
*Material, name=ALUMINIUM
*Elastic
 73.1, 0.33
**
** BOUNDARY CONDITIONS
**
** Name: Disp-BC-1 Type: Displacement/Rotation
*Boundary
SET-33, 2, 2
** Name: Disp-BC-2 Type: Displacement/Rotation
*Boundary
SET-33, 3, 3
** Name: Disp-BC-3 Type: Displacement/Rotation
*Boundary
SET-34, 1, 1
** Name: Disp-BC-4 Type: Displacement/Rotation
*Boundary
SET-34, 2, 2
** Name: Disp-BC-5 Type: Displacement/Rotation
*Boundary
SET-34, 3, 3
** Name: Disp-BC-6 Type: Displacement/Rotation
*Boundary
SET-35, 2, 2
** Name: Disp-BC-7 Type: Displacement/Rotation
*Boundary
SET-35, 3, 3
** ----------------------------------------------------------------
**
** STEP: RotationUp
**
*Step, name=RotationUp, nlgeom=NO
*Static
1., 1., 1e-05, 1.
**
** BOUNDARY CONDITIONS
**
** Name: Disp-BC-1 Type: Displacement/Rotation
*Boundary, op=NEW
** Name: Disp-BC-2 Type: Displacement/Rotation
*Boundary, op=NEW
** Name: Disp-BC-3 Type: Displacement/Rotation
*Boundary, op=NEW
SET-34, 1, 1
** Name: Disp-BC-4 Type: Displacement/Rotation
*Boundary, op=NEW
SET-34, 2, 2
** Name: Disp-BC-5 Type: Displacement/Rotation
*Boundary, op=NEW
SET-34, 3, 3
** Name: Disp-BC-6 Type: Displacement/Rotation
*Boundary, op=NEW
** Name: Disp-BC-7 Type: Displacement/Rotation
*Boundary, op=NEW
SET-35, 3, 3
** Name: Disp-BC-8 Type: Displacement/Rotation
*Boundary, op=NEW
SET-33, 2, 2, 11.03
** Name: Disp-BC-9 Type: Displacement/Rotation
*Boundary, op=NEW
SET-33, 3, 3
** Name: Disp-BC-10 Type: Displacement/Rotation
*Boundary, op=NEW
SET-34, 4, 4, 0.4538
** Name: Disp-BC-11 Type: Displacement/Rotation
*Boundary, op=NEW
SET-35, 2, 2, 16.42
**
** OUTPUT REQUESTS
**
*Restart, write, frequency=0
**
** FIELD OUTPUT: F-Output-3
**
*Output, field
*Contact Output
CDISP, CSTRESS
**
** FIELD OUTPUT: F-Output-1
**
*Node Output
CF, RF, RT, U
**
** FIELD OUTPUT: F-Output-2
**
*Element Output, directions=YES
LE, PE, PEEQ, PEMAG, S
**
** HISTORY OUTPUT: H-Output-1
**
*Output, history, variable=PRESELECT
*End Step
** ----------------------------------------------------------------
**
** STEP: Jam1
**
*Step, name=Jam1, nlgeom=NO
*Static
1., 1., 1e-05, 1.
**
** BOUNDARY CONDITIONS
**
** Name: Disp-BC-12 Type: Displacement/Rotation
*Boundary, fixed
SET-36, 3, 3
**
** LOADS
**
** Name: CFORCE-1   Type: Concentrated force
*Cload
SET-37, 3, -91.69
** Name: CFORCE-2   Type: Concentrated force
*Cload
SET-38, 2, -0.627
** Name: CFORCE-4   Type: Concentrated force
*Cload
SET-40, 2, -1.254
** Name: CFORCE-5   Type: Concentrated force
*Cload
SET-41, 2, -1.254
** Name: CFORCE-6   Type: Concentrated force
*Cload
SET-42, 2, -1.254
** Name: CFORCE-7   Type: Concentrated force
*Cload
SET-43, 2, -1.254
** Name: CFORCE-8   Type: Concentrated force
*Cload
SET-45, 2, -1.254
** Name: CFORCE-9   Type: Concentrated force
*Cload
SET-46, 2, -1.254
** Name: CFORCE-10   Type: Concentrated force
*Cload
SET-47, 2, -1.254
** Name: CFORCE-11   Type: Concentrated force
*Cload
SET-50, 2, -1.254
** Name: CFORCE-12   Type: Concentrated force
*Cload
SET-49, 2, -1.254
** Name: CFORCE-13   Type: Concentrated force
*Cload
SET-39, 2, -0.627
**
** OUTPUT REQUESTS
**
*Restart, write, frequency=0
**
** FIELD OUTPUT: F-Output-6
**
*Output, field
*Contact Output
CDISP, CSTRESS
**
** FIELD OUTPUT: F-Output-4
**
*Node Output
CF, RF, RT, U
**
** FIELD OUTPUT: F-Output-5
**
*Element Output, directions=YES
LE, MISES, PE, PEEQ, PEMAG, S
**
** HISTORY OUTPUT: H-Output-2
**
*Output, history, variable=PRESELECT
*End Step
** ----------------------------------------------------------------
**
** STEP: RotationDown
**
*Step, name=RotationDown, nlgeom=NO
*Static
1., 1., 1e-05, 1.
**
** BOUNDARY CONDITIONS
**
** Name: Disp-BC-3 Type: Displacement/Rotation
*Boundary, op=NEW
** Name: Disp-BC-4 Type: Displacement/Rotation
*Boundary, op=NEW
** Name: Disp-BC-5 Type: Displacement/Rotation
*Boundary, op=NEW
** Name: Disp-BC-7 Type: Displacement/Rotation
*Boundary, op=NEW
** Name: Disp-BC-8 Type: Displacement/Rotation
*Boundary, op=NEW
** Name: Disp-BC-9 Type: Displacement/Rotation
*Boundary, op=NEW
** Name: Disp-BC-10 Type: Displacement/Rotation
*Boundary, op=NEW
** Name: Disp-BC-11 Type: Displacement/Rotation
*Boundary, op=NEW
** Name: Disp-BC-12 Type: Displacement/Rotation
*Boundary, op=NEW
** Name: Disp-BC-13 Type: Displacement/Rotation
*Boundary, op=NEW
SET-33, 2, 2, 11.03
** Name: Disp-BC-14 Type: Displacement/Rotation
*Boundary, op=NEW
SET-33, 3, 3
** Name: Disp-BC-15 Type: Displacement/Rotation
*Boundary, op=NEW
SET-34, 1, 1
** Name: Disp-BC-16 Type: Displacement/Rotation
*Boundary, op=NEW
SET-34, 2, 2
** Name: Disp-BC-17 Type: Displacement/Rotation
*Boundary, op=NEW
SET-34, 3, 3
** Name: Disp-BC-18 Type: Displacement/Rotation
*Boundary, op=NEW
SET-34, 4, 4, -0.3316
** Name: Disp-BC-19 Type: Displacement/Rotation
*Boundary, op=NEW
SET-35, 2, 2, 16.42
** Name: Disp-BC-20 Type: Displacement/Rotation
*Boundary, op=NEW
SET-35, 3, 3
**
** LOADS
**
** Name: CFORCE-1   Type: Concentrated force
*Cload, op=NEW
** Name: CFORCE-2   Type: Concentrated force
*Cload, op=NEW
** Name: CFORCE-4   Type: Concentrated force
*Cload, op=NEW
** Name: CFORCE-5   Type: Concentrated force
*Cload, op=NEW
** Name: CFORCE-6   Type: Concentrated force
*Cload, op=NEW
** Name: CFORCE-7   Type: Concentrated force
*Cload, op=NEW
** Name: CFORCE-8   Type: Concentrated force
*Cload, op=NEW
** Name: CFORCE-9   Type: Concentrated force
*Cload, op=NEW
** Name: CFORCE-10   Type: Concentrated force
*Cload, op=NEW
** Name: CFORCE-11   Type: Concentrated force
*Cload, op=NEW
** Name: CFORCE-12   Type: Concentrated force
*Cload, op=NEW
** Name: CFORCE-13   Type: Concentrated force
*Cload, op=NEW
**
** OUTPUT REQUESTS
**
*Restart, write, frequency=0
**
** FIELD OUTPUT: F-Output-9
**
*Output, field
*Contact Output
CDISP, CSTRESS
**
** FIELD OUTPUT: F-Output-7
**
*Node Output
CF, RF, RT, U
**
** FIELD OUTPUT: F-Output-8
**
*Element Output, directions=YES
LE, MISES, PE, PEEQ, PEMAG, S
**
** HISTORY OUTPUT: H-Output-3
**
*Output, history, variable=PRESELECT
*End Step
** ----------------------------------------------------------------
**
** STEP: Jam2
**
*Step, name=Jam2, nlgeom=NO
*Static
1., 1., 1e-05, 1.
**
** BOUNDARY CONDITIONS
**
** Name: Disp-BC-21 Type: Displacement/Rotation
*Boundary, fixed
SET-51, 3, 3
**
** LOADS
**
** Name: CFORCE-15   Type: Concentrated force
*Cload
SET-52, 2, 0.418
** Name: CFORCE-16   Type: Concentrated force
*Cload
SET-53, 2, 0.418
** Name: CFORCE-17   Type: Concentrated force
*Cload
SET-54, 2, 0.836
** Name: CFORCE-18   Type: Concentrated force
*Cload
SET-55, 2, 0.836
** Name: CFORCE-19   Type: Concentrated force
*Cload
SET-56, 2, 0.836
** Name: CFORCE-20   Type: Concentrated force
*Cload
SET-57, 2, 0.836
** Name: CFORCE-21   Type: Concentrated force
*Cload
SET-58, 2, 0.836
** Name: CFORCE-22   Type: Concentrated force
*Cload
SET-59, 2, 0.836
** Name: CFORCE-23   Type: Concentrated force
*Cload
SET-60, 2, 0.836
** Name: CFORCE-24   Type: Concentrated force
*Cload
SET-61, 2, 0.836
** Name: CFORCE-25   Type: Concentrated force
*Cload
SET-62, 2, 0.836
** Name: CFORCE-26   Type: Concentrated force
*Cload
SET-63, 3, 91.69
**
** OUTPUT REQUESTS
**
*Restart, write, frequency=0
**
** FIELD OUTPUT: F-Output-12
**
*Output, field
*Contact Output
CDISP, CSTRESS
**
** FIELD OUTPUT: F-Output-10
**
*Node Output
CF, RF, RT, U
**
** FIELD OUTPUT: F-Output-11
**
*Element Output, directions=YES
LE, MISES, PE, PEEQ, PEMAG, S
**
** HISTORY OUTPUT: H-Output-4
**
*Output, history, variable=PRESELECT
*End Step
